<?xml version="1.0" encoding="UTF-8"?>
<?xml-stylesheet type="text/xsl" href="http://jsbsim.sourceforge.net/JSBSimScript.xsl"?>
<runscript xmlns:xsi="http://www.w3.org/2001/XMLSchema-instance"
    xsi:noNamespaceSchemaLocation="http://jsbsim.sf.net/JSBSimScript.xsd"
    name="C172 cruise at 4K, 100% power">
  <description>This run is for testing the C172 altitude hold autopilot and cruise performance</description>
  <use aircraft="c172x" initialize="reset01"/>

  <run start="0" end="1000" dt="0.01">

    <event name="Set engines running">
        <condition> simulation/sim-time-sec le 0.1 </condition>
        <set name="propulsion/engine[0]/set-running" value="1"/>
        <notify/>
      </event>


  </run>
  <output name="localhost" type="FLIGHTGEAR" protocol="UDP" port="5550" rate="60">
</output>
</runscript>
